*Heading
** Job name: Job-1 Model name: Model-1
** Generated by: Abaqus/CAE 6.14-1
*Preprint, echo=NO, model=NO, history=NO, contact=NO
**
** PARTS
**
*Part, name=Part-1
*Node
      1,          50.,           0.
      2,        50.25,           0.
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*Element, type=CAX6M
  1,    1,    2,   23,  442,  443,  444
  2,   23,   22,    1,  445,  446,  444
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*Nset, nset=_PickedSet6, internal, generate
    1,  1681,     1
*Elset, elset=_PickedSet6, internal, generate
   1,  800,    1
*Nset, nset=BC_Esq
    1,   22,   43,   64,   85,  106
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** Section: Section-1
*Solid Section, elset=_PickedSet6, material=Material-1
,
*End Part
**
**
** ASSEMBLY
**
*Assembly, name=Assembly
**
*Instance, name=Part-1-1, part=Part-1
*End Instance
**
*Nset, nset=BCbaixo, instance=Part-1-1
   1,   2,   3,   4,   5,   6
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*Elset, elset=BCbaixo, instance=Part-1-1, generate
  1,  39,   2
*Nset, nset=Set-2, instance=Part-1-1
   1,   2,   3,   4,   5,   6
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*Elset, elset=Set-2, instance=Part-1-1, generate
  1,  39,   2
*Nset, nset=Upper, instance=Part-1-1
  421,  422,  423,  424,  425,  426
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*Elset, elset=Upper, instance=Part-1-1, generate
 762,  800,    2
*Elset, elset=_Surf-1_S2, internal, instance=Part-1-1, generate
   2,  762,   40
*Surface, type=ELEMENT, name=Surf-1
_Surf-1_S2, S2
*End Assembly
**
** MATERIALS
**
*Material, name=Material-1
*Elastic
200000., 0.3
** ----------------------------------------------------------------
**
** STEP: Step-1
**
*Step, name=Step-1, nlgeom=NO
*Static
1., 1., 1e-05, 1.
**
** BOUNDARY CONDITIONS
**
** Name: BC-1 Type: Displacement/Rotation
*Boundary
BCbaixo, 2, 2
** Name: BC-2 Type: Displacement/Rotation
*Boundary
Upper, 2, 2
**
** LOADS
**
** Name: Load-1   Type: Concentrated force
*Cload
Part-1-1.BC_Esq, 1, 2.5
**
** OUTPUT REQUESTS
**
*Restart, write, frequency=0
**
** FIELD OUTPUT: F-Output-1
**
*Output, field, variable=PRESELECT
**
** HISTORY OUTPUT: H-Output-1
**
*Output, history, variable=PRESELECT
*End Step
