*Heading
** Job name: Viguinha Model name: Model-1
** Generated by: Abaqus/CAE 6.14-1
*Preprint, echo=NO, model=NO, history=NO, contact=NO
**
** PARTS
**
*Part, name=Part-1
*Node
      1,          35.,           5.
      2,          34.,           5.
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*Element, type=CPE6M
  1,   1,   2,  38, 217, 218, 219
  2,  38,  37,   1, 220, 221, 219
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*Nset, nset=Set-4, generate
   1,  781,    1
*Elset, elset=Set-4, generate
   1,  350,    1
*Nset, nset=Set-2
   1,  37,  73, 109, 145, 181, 221, 361, 467, 573, 679
** Section: Section-1
*Solid Section, elset=Set-4, material=Material-1, ref node=Part-1-RefPt_
1.,
*End Part
**
**
** ASSEMBLY
**
*Assembly, name=Assembly
**
*Instance, name=Part-1-1, part=Part-1
*End Instance
**
*Nset, nset=Bound, instance=Part-1-1
  36,  72, 108, 144, 180, 216, 355, 461, 567, 673, 779
*Elset, elset=Bound, instance=Part-1-1, generate
  69,  349,   70
*Nset, nset=Set-2, instance=Part-1-1
  36,  72, 108, 144, 180, 216, 355, 461, 567, 673, 779
*Elset, elset=Set-2, instance=Part-1-1, generate
  69,  349,   70
*End Assembly
**
** MATERIALS
**
*Material, name=Material-1
*Elastic
200000., 0.3
**
** BOUNDARY CONDITIONS
**
** Name: BC-1 Type: Displacement/Rotation
*Boundary
Bound, 1, 1
Bound, 2, 2
** ----------------------------------------------------------------
**
** STEP: Step-1
**
*Step, name=Step-1, nlgeom=NO
*Static
1., 1., 1e-05, 1.
**
** LOADS
**
** Name: Load-1   Type: Concentrated force
*Cload
Part-1-1.Set-2, 2, -25.
**
** OUTPUT REQUESTS
**
*Restart, write, frequency=0
**
** FIELD OUTPUT: F-Output-1
**
*Output, field, variable=PRESELECT
**
** HISTORY OUTPUT: H-Output-1
**
*Output, history, variable=PRESELECT
*End Step
