*Heading
 Alo
** Job name: Job-1 Model name: Model-1
** Generated by: Abaqus/CAE 6.14-1
*Preprint, echo=NO, model=NO, history=NO, contact=NO
** ----------------------------------------------------------------
**
** PART INSTANCE: Part-1-1
**
*Node
      1,           0.,           0.
      2,           0.,         -10.
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*Element, type=CPS3
  1,  66,  60,   1
  2,  67,  18,  19
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** ----------------------------------------------------------------
**
** PART INSTANCE: Part-1-2
**
*Node
    106,           0.,           0.
    107,           0.,         -10.
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*Element, type=CPS3
155, 171, 165, 106
156, 172, 123, 124
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*System
*Nset, nset=Set-1
106,107,114,115,116,117,118,158,159
*Elset, elset=Set-1
 165, 188, 214, 215, 217, 229, 304, 308
*Nset, nset=Set-2
113,
**
** MATERIALS
**
*Material, name=Material-1
*Elastic
200000., 0.3
**
** BOUNDARY CONDITIONS
**
** Name: BC-1 Type: Displacement/Rotation
*Boundary
Set-1, 1, 1
Set-1, 2, 2
** ----------------------------------------------------------------
**
** STEP: Step-1
**
*Step, name=Step-1, nlgeom=NO
*Static
1., 1., 1e-05, 1.
**
** LOADS
**
** Name: Load-1   Type: Concentrated force
*Cload
Set-2, 2, -5000.
**
** OUTPUT REQUESTS
**
*Restart, write, frequency=0
**
** FIELD OUTPUT: F-Output-1
**
*Output, field, variable=PRESELECT
**
** HISTORY OUTPUT: H-Output-1
**
*Output, history, variable=PRESELECT
*End Step
